*NODE, NSET=NALL
1, 0.0, 0.0, 0.0
2, 100.0, 0.0, 0.0
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*ELEMENT, TYPE=B32R, ELSET=RAILS
1, 1, 2, 3
2, 3, 4, 5
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*ELEMENT, TYPE=B32R, ELSET=CROSS
21, 1, 43, 44
22, 44, 45, 46
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*ELEMENT, TYPE=B32R, ELSET=DRAWBAR
41, 80, 81, 82
42, 82, 83, 84
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*ELEMENT, TYPE=B32R, ELSET=APEX
61, 96, 117, 118
*ELEMENT, TYPE=B32R, ELSET=VJOINT
49, 9, 97, 80
50, 46, 98, 86
59, 30, 115, 99
60, 54, 116, 105
*MATERIAL, NAME=S355
*ELASTIC
210000., 0.3
*BEAM SECTION, ELSET=RAILS, MATERIAL=S355, SECTION=BOX
50., 50., 3., 3., 3., 3.
0., 0., 1.
*BEAM SECTION, ELSET=CROSS, MATERIAL=S355, SECTION=BOX
50., 50., 3., 3., 3., 3.
0., 0., 1.
*BEAM SECTION, ELSET=DRAWBAR, MATERIAL=S355, SECTION=BOX
50., 50., 3., 3., 3., 3.
0., 0., 1.
*BEAM SECTION, ELSET=APEX, MATERIAL=S355, SECTION=RECT
110., 70.
0., 1., 0.
*BEAM SECTION, ELSET=VJOINT, MATERIAL=S355, SECTION=RECT
30., 30.
1., 0., 0.
** LC: diagonal racking - three frame corners held, the fourth
** lifted 30 mm. Shows the torsional load path of the BOLTED
** (non-welded) frame. Joints idealized rigid -> stresses are
** load-path indicators; RF at the lifted corner = torsional
** stiffness of the ladder frame.
*BOUNDARY
1, 1, 3
22, 1, 1
22, 3, 3
21, 3, 3
*STEP
*STATIC
*BOUNDARY
42, 3, 3, 30.0
*NODE FILE
U
*EL FILE
S
*EL PRINT, ELSET=RAILS
S
*EL PRINT, ELSET=CROSS
S
*EL PRINT, ELSET=DRAWBAR
S
*EL PRINT, ELSET=APEX
S
*EL PRINT, ELSET=VJOINT
S
*NODE PRINT, NSET=NALL, TOTALS=ONLY
RF
*END STEP
